<?xml version="1.0"?>
<?xml-stylesheet type="text/xsl" href="http://jsbsim.sourceforge.net/JSBSim.xsl"?>
<fdm_config name="T-50" version="2.0" release="ALPHA"
   xmlns:xsi="http://www.w3.org/2001/XMLSchema-instance"
   xsi:noNamespaceSchemaLocation="http://jsbsim.sourceforge.net/JSBSim.xsd">

 <fileheader>
  <author> Ummon Karpe, Petar Jedvaj </author>
  <filecreationdate> 2012-08-18 </filecreationdate>
  <version>$Revision: 2.0 $</version>
  <description> Sukhoi T-50 PAK FA </description>
  <reference refID="1"
             author="Cheng Liangliang, Yue Kuizhi, Guo Weigang, Yu Dazhao"
             title="Integration Analysis of Conceptual Design and Stealth-Aerodynamic Characteristics of Combat Aircraft"
             date="2016"/>
 </fileheader>

 <metrics>
   <wingarea  unit="M2">   78.8 </wingarea>
   <wingspan  unit="M" >   14.0 </wingspan>
   <wing_incidence>         2.0 </wing_incidence>
   <chord     unit="M" >    5.6 </chord>
   <htailarea unit="M2">   15.8 </htailarea>
   <htailarm  unit="M" >    6.0 </htailarm>
   <vtailarea unit="M2">   14.1 </vtailarea>
   <vtailarm  unit="M" >    6.0 </vtailarm>
   <location name="AERORP" unit="M">
     <x>  0.3 </x>
     <y>  0.0 </y>
     <z>  0.0 </z>
   </location>
   <location name="EYEPOINT" unit="M">
     <x> -5.7 </x>
     <y>  0.0 </y>
     <z>  1.0 </z>
   </location>
   <location name="VRP" unit="M">
     <x>0</x>
     <y>0</y>
     <z>0</z>
   </location>
 </metrics>

 <mass_balance>
   <ixx unit="KG*M2">   91435 </ixx>
   <iyy unit="KG*M2">  251390 </iyy>
   <izz unit="KG*M2">  266320 </izz>
   <emptywt unit="KG">  18500 </emptywt>
   <location name="CG" unit="M">
     <x>  0.00 </x>
     <y>  0.00 </y>
     <z>  0.00 </z>
   </location>
 </mass_balance>

 <ground_reactions>
  <contact type="BOGEY" name="NOSE_GEAR">
   <location unit="M">
     <x> -3.50 </x>
     <y>  0.00 </y>
     <z> -1.90 </z>
   </location>
   <static_friction>  0.80 </static_friction>
   <dynamic_friction> 0.50 </dynamic_friction>
   <rolling_friction> 0.02 </rolling_friction>
   <spring_coeff unit="LBS/FT">      40000 </spring_coeff>
   <damping_coeff unit="LBS/FT/SEC"> 20000 </damping_coeff>
   <max_steer unit="DEG">360</max_steer>
   <brake_group>NONE</brake_group>
   <retractable>1</retractable>
  </contact>

  <contact type="BOGEY" name="LEFT_GEAR">
   <location unit="M">
     <x>  2.7 </x>
     <y> -2.4 </y>
     <z> -1.9 </z>
   </location>
   <static_friction>  0.80 </static_friction>
   <dynamic_friction> 0.50 </dynamic_friction>
   <rolling_friction> 0.02 </rolling_friction>
   <spring_coeff unit="LBS/FT">      80967.60 </spring_coeff>
   <damping_coeff unit="LBS/FT/SEC"> 40483.80 </damping_coeff>
   <max_steer unit="DEG">0</max_steer>
   <brake_group>LEFT</brake_group>
   <retractable>1</retractable>
  </contact>

  <contact type="BOGEY" name="RIGHT_GEAR">
   <location unit="M">
     <x>  2.7 </x>
     <y>  2.4 </y>
     <z> -1.9 </z>
   </location>
   <static_friction>  0.80 </static_friction>
   <dynamic_friction> 0.50 </dynamic_friction>
   <rolling_friction> 0.02 </rolling_friction>
   <spring_coeff unit="LBS/FT">      80967.60 </spring_coeff>
   <damping_coeff unit="LBS/FT/SEC"> 40483.80 </damping_coeff>
   <max_steer unit="DEG">0</max_steer>
   <brake_group>RIGHT</brake_group>
   <retractable>1</retractable>
  </contact>

  <contact type="STRUCTURE" name="NOSE">
    <location unit="M">
     <x> -10.34 </x>
     <y>   0.00 </y>
     <z>   0.00 </z>
    </location>
    <static_friction>  0.80 </static_friction>
    <dynamic_friction> 0.50 </dynamic_friction>
    <spring_coeff unit="LBS/FT">      81585.00 </spring_coeff>
    <damping_coeff unit="LBS/FT/SEC"> 16317.00 </damping_coeff>
 </contact>

   <contact type="STRUCTURE" name="LEFT_BODY">
    <location unit="M">
     <x> -0.80 </x>
     <y> -1.70 </y>
     <z> -0.65 </z>
    </location>
    <static_friction>  0.80 </static_friction>
    <dynamic_friction> 0.50 </dynamic_friction>
    <spring_coeff unit="LBS/FT">      81585.00 </spring_coeff>
    <damping_coeff unit="LBS/FT/SEC"> 16317.00 </damping_coeff>
 </contact>

   <contact type="STRUCTURE" name="RIGHT_BODY">
    <location unit="M">
     <x> -0.80 </x>
     <y>  1.70 </y>
     <z> -0.65 </z>
    </location>
    <static_friction>  0.80 </static_friction>
    <dynamic_friction> 0.50 </dynamic_friction>
    <spring_coeff unit="LBS/FT">      81585.00 </spring_coeff>
    <damping_coeff unit="LBS/FT/SEC"> 16317.00 </damping_coeff>
 </contact>

  <contact type="STRUCTURE" name="LEFT_WING">
    <location unit="M">
     <x>  4.80 </x>
     <y> -7.00 </y>
     <z>  0.10 </z>
    </location>
    <static_friction>  0.80 </static_friction>
    <dynamic_friction> 0.50 </dynamic_friction>
    <spring_coeff unit="LBS/FT">      81585.00 </spring_coeff>
    <damping_coeff unit="LBS/FT/SEC"> 16317.00 </damping_coeff>
 </contact>

  <contact type="STRUCTURE" name="RIGHT_WING">
    <location unit="M">
     <x>  4.80 </x>
     <y>  7.00 </y>
     <z>  0.10 </z>
    </location>
    <static_friction>  0.80 </static_friction>
    <dynamic_friction> 0.50 </dynamic_friction>
    <spring_coeff unit="LBS/FT">      81585.00 </spring_coeff>
    <damping_coeff unit="LBS/FT/SEC"> 16317.00 </damping_coeff>
 </contact>

  <contact type="STRUCTURE" name="LEFT_RUDDER">
    <location unit="M">
     <x>  6.50 </x>
     <y> -3.30 </y>
     <z>  2.40 </z>
    </location>
    <static_friction>  0.80 </static_friction>
    <dynamic_friction> 0.50 </dynamic_friction>
    <spring_coeff unit="LBS/FT">      81585.00 </spring_coeff>
    <damping_coeff unit="LBS/FT/SEC"> 16317.00 </damping_coeff>
 </contact>

  <contact type="STRUCTURE" name="RIGHT_RUDDER">
    <location unit="M">
     <x>  6.50 </x>
     <y>  3.30 </y>
     <z>  2.40 </z>
    </location>
    <static_friction>  0.80 </static_friction>
    <dynamic_friction> 0.50 </dynamic_friction>
    <spring_coeff unit="LBS/FT">      81585.00 </spring_coeff>
    <damping_coeff unit="LBS/FT/SEC"> 16317.00 </damping_coeff>
 </contact>
 </ground_reactions>

 <propulsion>
   <engine file="Saturn">
    <feed>0</feed>
    <feed>1</feed>
    <feed>2</feed>
    <thruster file="direct">
    <location unit="M">
      <x>  5.00 </x>
      <y> -1.44 </y>
      <z>  0.00 </z>
    </location>
     <orient unit="DEG">
       <pitch> 0.00 </pitch>
       <roll>  0.00 </roll>
       <yaw>   0.00 </yaw>
     </orient>
    </thruster>
  </engine>

   <engine file="Saturn">
    <feed>0</feed>
    <feed>1</feed>
    <feed>2</feed>
    <thruster file="direct">
    <location unit="M">
      <x>  5.00 </x>
      <y>  1.44 </y>
      <z>  0.00 </z>
    </location>
     <orient unit="DEG">
       <pitch> 0.00 </pitch>
       <roll>  0.00 </roll>
       <yaw>   0.00 </yaw>
     </orient>
    </thruster>
  </engine>

  <tank type="FUEL" number="0">
     <location unit="M">
       <x> -1.00 </x>
       <y>  0.00 </y>
       <z>  0.00 </z>
     </location>
     <capacity unit="KG"> 6000.00 </capacity>
     <contents unit="KG"> 2500.00 </contents>
  </tank>
  <tank type="FUEL" number="1">
     <location unit="M">
       <x>  2.00 </x>
       <y> -2.40 </y>
       <z>  0.00 </z>
     </location>
     <capacity unit="KG"> 2000.00 </capacity>
     <contents unit="KG"> 1500.00 </contents>
  </tank>
  <tank type="FUEL" number="2">
     <location unit="M">
       <x>  2.00 </x>
       <y>  2.40 </y>
       <z>  0.00 </z>
     </location>
     <capacity unit="KG"> 2000.00 </capacity>
     <contents unit="KG"> 1500.00 </contents>
  </tank>
 </propulsion>

    <system file="jsb-electrical"/>
    <flight_control file="Systems/jsb-controls"/>
    <aerodynamics file="Systems/jsb-aerodynamics.xml"/>
</fdm_config>
