<?xml version="1.0" encoding="UTF-8"?>
<flight_control name="FCS: Su-57-Jsb">
	<property value="1">fcs/yaw-damper-enable</property>
	<property value="0">fcs/maneuver</property>
	<property value="0">fcs/fbw-failure</property>
	<property value="0">fcs/tvc-failure</property>

	<channel name="Fly-by-wire">
		<switch name="fcs/fbw-enabled">
			<default value="0"/>
			<test logic="AND" value="1">
				fcs/maneuver lt 1
				fcs/fbw-failure lt 1
			</test>
		</switch>
		<fcs_function name="fcs/speed-limit">
			<function>
				<description>Speed Limit</description>
				<table>
				<independentVar lookup="row">velocities/mach</independentVar>
					<tableData>
						0.0 1.0
						0.2 1.0
						0.4 0.8
						0.6 0.4
					</tableData>
				</table>
			</function>
		</fcs_function>
		<fcs_function name="fcs/pitch-up-limit-pre">
			<function>
				<description>Pitch Up Limit</description>
				<product>
					<table>
						<independentVar lookup="row">aero/alpha-deg</independentVar>
						<independentVar lookup="column">attitude/pitch-rad</independentVar>
						<tableData>
								0.0  0.2  0.4  0.6
							 0 -1.0 -1.0  0.0  0.5
							 2 -1.0 -1.0  0.0  0.5
							 4 -1.0 -1.0  0.0  0.5
							 6 -0.5 -0.5  0.0  0.5
							 8  0.0  0.0  0.0  0.5
							10  0.5  0.5  0.5  0.5
						</tableData>
					</table>
					<property>fcs/speed-limit</property>
				</product>
			</function>
		</fcs_function>
		<fcs_function name="fcs/pitch-down-limit-pre">
			<function>
				<description>Pitch Up Limit</description>
				<product>
					<table>
						<independentVar lookup="row">aero/alpha-deg</independentVar>
						<independentVar lookup="column">attitude/pitch-rad</independentVar>
						<tableData>
							   -0.6 -0.4 -0.2  0.0
							 0 -0.5  0.0  1.0  1.0
							 2 -0.5  0.0  1.0  1.0
							 4 -0.5  0.0  1.0  1.0
							 6  0.0  0.5  1.0  1.0
							 8  0.0  0.5  1.0  1.0
							10  0.0  0.5  1.0  1.0
						</tableData>
					</table>
					<property>fcs/speed-limit</property>
				</product>
			</function>
		</fcs_function>
		<switch name="fcs/pitch-up-limit">
			<default value="fcs/pitch-up-limit-pre"/>
			<test logic="AND" value="-0.5">
				/instrumentation/mk-viii/outputs/discretes/gpws-warning gt 0
				fcs/pitch-up-limit-pre gt -0.5
			</test>
		</switch>
		<switch name="fcs/pitch-down-limit">
			<default value="fcs/pitch-down-limit-pre"/>
			<test logic="AND" value="-0.5">
				/instrumentation/mk-viii/outputs/discretes/gpws-warning gt 0
				fcs/pitch-down-limit-pre gt -0.5
			</test>
		</switch>
		<fcs_function name="fcs/roll-left-limit">
			<function>
				<description>Roll Left Limit</description>
				<table>
					<independentVar lookup="row">attitude/roll-rad</independentVar>
					<tableData>
						-0.8  0.2
						-0.6  0.0
						-0.4 -0.8
						-0.2 -1.0
						 0.0 -1.0
					</tableData>
				</table>
			</function>
		</fcs_function>
		<fcs_function name="fcs/roll-right-limit">
			<function>
				<description>Roll Right Limit</description>
				<table>
					<independentVar lookup="row">attitude/roll-rad</independentVar>
					<tableData>
						 0.0  1.0
						 0.2  1.0
						 0.4  0.8
						 0.6  0.0
						 0.8 -0.2
					</tableData>
				</table>
			</function>
		</fcs_function>
		<switch name="fcs/min-pitch">
			<default value="-1.0"/>
			<test logic="AND" value="fcs/pitch-up-limit">
				fcs/fbw-enabled == 1
			</test>
		</switch>
		<switch name="fcs/max-pitch">
			<default value="1.0"/>
			<test logic="AND" value="fcs/pitch-down-limit">
				fcs/fbw-enabled == 1
			</test>
		</switch>
		<switch name="fcs/min-roll">
			<default value="-1.0"/>
			<test logic="AND" value="fcs/roll-left-limit">
				fcs/fbw-enabled == 1
			</test>
		</switch>
		<switch name="fcs/max-roll">
			<default value="1.0"/>
			<test logic="AND" value="fcs/roll-right-limit">
				fcs/fbw-enabled == 1
			</test>
		</switch>
	</channel>

	<channel name="Thrust Vector Control">
		<switch name="fcs/tvc-enabled">
			<default value="0"/>
			<test logic="AND" value="1">
				fcs/maneuver gt 0
				fcs/tvc-failure lt 1
			</test>
		</switch>
		<aerosurface_scale name="Thrust Vector Horizontal CMD">
			<input>fcs/rudder-cmd-norm</input>
			<range>
				<min> -20 </min>
				<max>  20 </max>
			</range>
			<output>fcs/tvc-horz-cmd</output>
		</aerosurface_scale>
		<aerosurface_scale name="Thrust Vector Vertical CMD">
			<input>fcs/elevator-cmd-norm</input>
			<range>
				<min> -20 </min>
				<max>  20 </max>
			</range>
			<output>fcs/tvc-vert-cmd</output>
		</aerosurface_scale>
		<fcs_function name="fcs/tvc-horz-deg">
			<function>
				<description>Thrust Vector Horizontal</description>
				<product>
					<property>fcs/tvc-horz-cmd</property>
					<property>fcs/tvc-enabled</property>
				</product>
			</function>
			<output>fcs/tvc-horz-deg</output>
		</fcs_function>
		<fcs_function name="fcs/tvc-vert-deg">
			<function>
				<description>Thrust Vector Vertical</description>
				<product>
					<property>fcs/tvc-vert-cmd</property>
					<property>fcs/tvc-enabled</property>
				</product>
			</function>
			<output>fcs/tvc-vert-deg</output>
		</fcs_function>
	</channel>

	<channel name="Pitch">
		<summer name="Pitch Trim Sum">
			<input>fcs/elevator-cmd-norm</input>
			<input>fcs/pitch-trim-cmd-norm</input>
			<clipto>
				<min>fcs/min-pitch</min>
				<max>fcs/max-pitch</max>
			</clipto>
		</summer>
		<aerosurface_scale name="Elevator Control">
			<input>fcs/pitch-trim-sum</input>
			<range>
				<min> -0.35 </min>
				<max>  0.35 </max>
			</range>
			<output>fcs/elevator-pos-rad</output>
		</aerosurface_scale>
		<aerosurface_scale name="Elevator Normalization">
			<input>fcs/elevator-pos-rad</input>
			<domain>
				<min> -0.35 </min>
				<max>  0.35 </max>
			</domain>
			<range>
				<min> -1 </min>
				<max>  1 </max>
			</range>
			<output>fcs/elevator-pos-norm</output>
		</aerosurface_scale>
	</channel>

	<channel name="Roll">
		<summer name="Roll Trim Sum">
			<input>fcs/aileron-cmd-norm</input>
			<input>fcs/roll-trim-cmd-norm</input>
			<clipto>
				<min>fcs/min-roll</min>
				<max>fcs/max-roll</max>
			</clipto>
		</summer>
		<aerosurface_scale name="Left Aileron Control">
			<input>fcs/roll-trim-sum</input>
			<range>
				<min> -0.35 </min>
				<max>  0.35 </max>
			</range>
			<output>fcs/left-aileron-pos-rad</output>
		</aerosurface_scale>
		<aerosurface_scale name="Right Aileron Control">
			<input>fcs/roll-trim-sum</input>
			<range>
				<min> -0.35 </min>
				<max>  0.35 </max>
			</range>
			<output>fcs/right-aileron-pos-rad</output>
		</aerosurface_scale>
		<aerosurface_scale name="left aileron normalization">
			<input>fcs/left-aileron-pos-rad</input>
			<domain>
				<min> -0.35 </min>
				<max>  0.35 </max>
			</domain>
			<range>
				<min> -1 </min>
				<max>  1 </max>
			</range>
			<output>fcs/left-aileron-pos-norm</output>
		</aerosurface_scale>
		<aerosurface_scale name="right aileron normalization">
			<input>fcs/right-aileron-pos-rad</input>
			<domain>
				<min> -0.35 </min>
				<max>  0.35 </max>
			</domain>
			<range>
				<min> -1 </min>
				<max>  1 </max>
			</range>
			<output>fcs/right-aileron-pos-norm</output>
		</aerosurface_scale>
	</channel>

	<channel name="Yaw">
		<summer name="Rudder Command Sum">
			<input>fcs/rudder-cmd-norm</input>
			<input>fcs/yaw-trim-cmd-norm</input>
			<clipto>
				<min> -1 </min>
				<max>  1 </max>
			</clipto>
		</summer>
		<scheduled_gain name="Yaw Damper Rate">
			<input>velocities/r-aero-rad_sec</input>
			<table>
				<independentVar lookup="row">velocities/ve-kts</independentVar>
				<tableData>
					30		0.00
					60		2.00
				</tableData>
			</table>
			<gain>fcs/yaw-damper-enable</gain>
		</scheduled_gain>
		<summer name="Rudder Sum">
			<input>fcs/rudder-command-sum</input>
			<input>fcs/yaw-damper-rate</input>
			<clipto>
				<min> -1.1 </min>
				<max>  1.1 </max>
			</clipto>
		</summer>
		<aerosurface_scale name="Rudder Control">
			<input>fcs/rudder-sum</input>
			<domain>
				<min> -1.1 </min>
				<max>  1.1 </max>
			</domain>
			<range>
				<min> -0.35 </min>
				<max>  0.35 </max>
			</range>
			<output>fcs/rudder-pos-rad</output>
		</aerosurface_scale>
		<aerosurface_scale name="rudder normalization">
			<input>fcs/rudder-pos-rad</input>
			<domain>
				<min> -0.35 </min>
				<max>  0.35 </max>
			</domain>
			<range>
				<min> -1 </min>
				<max>  1 </max>
			</range>
			<output>fcs/rudder-pos-norm</output>
		</aerosurface_scale>
	</channel>

	<channel name="Flaps">
		<kinematic name="Flaps Control">
			<input>fcs/flap-cmd-norm</input>
			<traverse>
			<setting>
				<position>  0 </position>
				<time>  	0 </time>
			</setting>
			<setting>
				<position> 15 </position>
				<time>  	4 </time>
			</setting>
			<setting>
				<position> 30 </position>
				<time>  	3 </time>
			</setting>
			</traverse>
			<output>fcs/flap-pos-deg</output>
		</kinematic>
		<aerosurface_scale name="flap normalization">
			<input>fcs/flap-pos-deg</input>
			<domain>
				<min>  0 </min>
				<max> 30 </max>
			</domain>
			<range>
				<min> 0 </min>
				<max> 1 </max>
			</range>
			<output>fcs/flap-pos-norm</output>
		</aerosurface_scale>
	</channel>

	<channel name="Landing Gear">
		<kinematic name="Gear Control">
			<input>gear/gear-cmd-norm</input>
			<traverse>
			<setting>
				<position> 0 </position>
				<time>  	0 </time>
			</setting>
			<setting>
				<position> 1 </position>
				<time>  	5 </time>
			</setting>
			</traverse>
			<output>gear/gear-pos-norm</output>
		</kinematic>
	</channel>
</flight_control>
